# OpenSim document version 40500
MocoStudy:
  write_solution: true
  MocoProblem problem:
    MocoPhase phases:
      ModelProcessor model:
        model: Model moco_adjusted:
          gravity: 0 -9.80665 0
          length_units: meters
          force_units: N
          Ground
          BodySet:
            Body pelvis: mass=8.371007 [kg] mass_center=(-0.07392592 0 0)
                inertia=(0.09432937 0.09432937 0.04467701 0 0 0) meshes=(r_pelvis.vtp l_pelvis.vtp sacrum.vtp)
              WrapCylinder Gmax1_at_pelvis_r: xyz_body_rotation=(-0.6 0.45 0)
                  translation=(-0.08051337 -0.1027828 0.07143676) quadrant=-x radius=0.04289081 length=0.1672316
              WrapCylinder Gmax2_at_pelvis_r: xyz_body_rotation=(-0.75 0.39 0)
                  translation=(-0.08365026 -0.08617143 0.07963442) quadrant=all radius=0.0431465 length=0.1102076
              WrapCylinder Gmax3_at_pelvis_r: xyz_body_rotation=(-0.1 0 0)
                  translation=(-0.08678714 -0.09136248 0.07963442) quadrant=all radius=0.04170493 length=0.1169845
              WrapCylinder Gmax1_at_pelvis_l: xyz_body_rotation=(0.6 -0.45 0)
                  translation=(-0.08051337 -0.1027828 -0.07143676) quadrant=-x radius=0.04289081 length=0.1672316
              WrapCylinder Gmax2_at_pelvis_l: xyz_body_rotation=(0.75 -0.39 0)
                  translation=(-0.08365026 -0.08617143 -0.07963442) quadrant=all radius=0.0431465 length=0.1102076
              WrapCylinder Gmax3_at_pelvis_l: xyz_body_rotation=(0.1 0 0)
                  translation=(-0.08678714 -0.09136248 -0.07963442) quadrant=all radius=0.04170493 length=0.1169845
              WrapCylinder PS_at_brim_r: xyz_body_rotation=(-0.25 -0.27 0.1)
                  translation=(-0.07737649 -0.0622926 0.0768238) quadrant=-y radius=0.05253201 length=0.1155415
              WrapCylinder PS_at_brim_l: xyz_body_rotation=(0.25 0.27 0.1)
                  translation=(-0.07737649 -0.0622926 -0.0768238) quadrant=-y radius=0.05253201 length=0.1155415
              WrapCylinder IL_at_brim_r: xyz_body_rotation=(-0.32 -0.24 0.9)
                  translation=(-0.0742396 -0.06748365 0.08853474) quadrant=-y radius=0.05776455 length=0.1152536
              WrapCylinder IL_at_brim_l: xyz_body_rotation=(0.32 0.24 0.9)
                  translation=(-0.0742396 -0.06748365 -0.08853474) quadrant=-y radius=0.05776455 length=0.1152536
            Body femur_r: mass=6.611368 mass_center=(0 -0.1607654 0) inertia=(0.08511593 0.02231194 0.0897563 0 0 0)
                meshes=r_femur.vtp
              WrapCylinder Gastroc_at_condyles_r: translation=(0.004728393 -0.3877283 0) quadrant=all radius=0.02364197
                  length=0.09456787
              WrapCylinder KnExt_at_fem_r: xyz_body_rotation=(-0.0623366 0.0507601 0)
                  translation=(0.00339336 -0.3808551 0.001977518) quadrant=all radius=0.02364197 length=0.09456787
              WrapCylinder AB_at_femshaft_r: xyz_body_rotation=(1.66157 0.186644 0)
                  translation=(0.01384795 -0.1064787 0.02209578) quadrant=all radius=0.0156037 length=0.06619751
              WrapCylinder AL_at_femshaft_r: xyz_body_rotation=(1.77711 0.136489 0)
                  translation=(0.02906326 -0.2193114 0.0142927) quadrant=all radius=0.01900814 length=0.09456787
              WrapCylinder AMprox_at_femshaft_r: xyz_body_rotation=(1.61126 0.18656 0)
                  translation=(0.004901443 -0.06893506 0.02402308) quadrant=all radius=0.01995382 length=0.06619751
              WrapCylinder AMmid_at_femshaft_r: xyz_body_rotation=(1.61139 0.13656 0)
                  translation=(0.02176243 -0.151981 0.01946604) quadrant=all radius=0.02023752 length=0.1134814
              WrapCylinder AMdist_at_femshaft_r: xyz_body_rotation=(1.71188 0.186636 0)
                  translation=(0.02988959 -0.2465725 0.008855903) quadrant=all radius=0.0206158 length=0.1891357
              WrapCylinder AMisch_at_condyles_r: xyz_body_rotation=(1.71115 -0.463363 0)
                  translation=(-0.02142066 -0.356361 -0.00298302) quadrant=all radius=0.03782715 length=0.2269629
              WrapCylinder PECT_at_femshaft_r: xyz_body_rotation=(1.81295 0.276344 0)
                  translation=(0.005755145 -0.07991259 0.02878693) quadrant=all radius=0.01418518 length=0.04728393
            Body tibia_r: mass=2.635264 mass_center=(0 -0.192414 0) inertia=(0.03805034 0.003850332 0.03857881 0 0 0)
                meshes=(r_tibia.vtp r_fibula.vtp)
              WrapCylinder GasLat_at_shank_r: xyz_body_rotation=(2.96723 -0.279725 -1.47812)
                  translation=(-0.007626481 -0.07626481 -0.003400998) quadrant=-y radius=0.0566833 length=0.1030606
              WrapCylinder GasMed_at_shank_r: xyz_body_rotation=(2.96723 0.0279725 -1.47812)
                  translation=(-0.007626481 -0.07626481 -0.003400998) quadrant=-y radius=0.0566833 length=0.1030606
              WrapCylinder GR_at_condyles_r: xyz_body_rotation=(0 -0.4 0) translation=(-0.003091817 -0.02061211 0)
                  quadrant=all radius=0.0371018 length=0.1030606
              WrapCylinder SM_at_condyles_r: xyz_body_rotation=(0 -0.1 0) translation=(-0.001030606 -0.02061211 0)
                  quadrant=all radius=0.03627731 length=0.1030606
              WrapCylinder ST_at_condyles_r: xyz_body_rotation=(0 -0.2 0) translation=(-0.002061211 -0.02112741 0)
                  quadrant=all radius=0.04380073 length=0.1030606
              WrapCylinder BF_at_gastroc_r: translation=(-0.05977512 -0.06183633 0) quadrant=y radius=0.03091817
                  length=0.1545908
            Body patella_r: mass=0.06127034 mass_center=(0.001702222 0.02496592 0)
                inertia=(1.824367e-6 8.333606e-6 8.333606e-6 0 0 0) meshes=r_patella.vtp
            Body talus_r: mass=0.07107928 mass_center=(0 0 0) inertia=(0.001053089 0.0008684676 0.0008684676 0 0 0)
                meshes=r_talus.vtp
            Body calcn_r: mass=0.888491 mass_center=(0.09808616 0.04531432 0)
                inertia=(0.001474324 0.002925471 0.002925471 0 0 0) meshes=r_foot.vtp
            Body toes_r: mass=0.1539577 mass_center=(0.03393781 0.009062865 -0.01716508)
                inertia=(0.0001053089 0.0001552314 0.0001552314 0 0 0) meshes=r_bofoot.vtp
            Body femur_l: mass=6.611368 mass_center=(0 -0.1607654 0) inertia=(0.08511593 0.02231194 0.0897563 0 0 0)
                meshes=l_femur.vtp
              WrapCylinder Gastroc_at_condyles_l: translation=(0.004728393 -0.3877283 0) quadrant=all radius=0.02364197
                  length=0.09456787
              WrapCylinder KnExt_at_fem_l: xyz_body_rotation=(0.0623366 -0.0507601 0)
                  translation=(0.00339336 -0.3808551 -0.001977518) quadrant=all radius=0.02364197 length=0.09456787
              WrapCylinder AB_at_femshaft_l: xyz_body_rotation=(-1.66157 -0.186644 0)
                  translation=(0.01384795 -0.1064787 -0.02209578) quadrant=all radius=0.0156037 length=0.06619751
              WrapCylinder AL_at_femshaft_l: xyz_body_rotation=(-1.77711 -0.136489 0)
                  translation=(0.02906326 -0.2193114 -0.0142927) quadrant=all radius=0.01900814 length=0.09456787
              WrapCylinder AMprox_at_femshaft_l: xyz_body_rotation=(-1.61126 -0.18656 0)
                  translation=(0.004901443 -0.06893506 -0.02402308) quadrant=all radius=0.01995382 length=0.06619751
              WrapCylinder AMmid_at_femshaft_l: xyz_body_rotation=(-1.61139 -0.13656 0)
                  translation=(0.02176243 -0.151981 -0.01946604) quadrant=all radius=0.02023752 length=0.1134814
              WrapCylinder AMdist_at_femshaft_l: xyz_body_rotation=(-1.71188 -0.186636 0)
                  translation=(0.02988959 -0.2465725 -0.008855903) quadrant=all radius=0.0206158 length=0.1891357
              WrapCylinder AMisch_at_condyles_l: xyz_body_rotation=(-1.71115 0.463363 0)
                  translation=(-0.02142066 -0.356361 0.00298302) quadrant=all radius=0.03782715 length=0.2269629
              WrapCylinder PECT_at_femshaft_l: xyz_body_rotation=(-1.81295 -0.276344 0)
                  translation=(0.005755145 -0.07991259 -0.02878693) quadrant=all radius=0.01418518 length=0.04728393
            Body tibia_l: mass=2.635264 mass_center=(0 -0.192414 0) inertia=(0.03805034 0.003850332 0.03857881 0 0 0)
                meshes=(l_tibia.vtp l_fibula.vtp)
              WrapCylinder GasLat_at_shank_l: xyz_body_rotation=(-2.96723 0.279725 -1.47812)
                  translation=(-0.007626481 -0.07626481 0.003400998) quadrant=-y radius=0.0566833 length=0.1030606
              WrapCylinder GasMed_at_shank_l: xyz_body_rotation=(-2.96723 -0.0279725 -1.47812)
                  translation=(-0.007626481 -0.07626481 0.003400998) quadrant=-y radius=0.0566833 length=0.1030606
              WrapCylinder GR_at_condyles_l: xyz_body_rotation=(0 0.4 0) translation=(-0.003091817 -0.02061211 0)
                  quadrant=all radius=0.0371018 length=0.1030606
              WrapCylinder SM_at_condyles_l: xyz_body_rotation=(0 0.1 0) translation=(-0.001030606 -0.02061211 0)
                  quadrant=all radius=0.03627731 length=0.1030606
              WrapCylinder ST_at_condyles_l: xyz_body_rotation=(0 0.2 0) translation=(-0.002061211 -0.02112741 0)
                  quadrant=all radius=0.04380073 length=0.1030606
              WrapCylinder BF_at_gastroc_l: translation=(-0.05977512 -0.06183633 0) quadrant=all radius=0.03091817
                  length=0.1545908
            Body patella_l: mass=0.06127034 mass_center=(0.001702222 0.02496592 0)
                inertia=(1.824367e-6 8.333606e-6 8.333606e-6 0 0 0) meshes=l_patella.vtp
            Body talus_l: mass=0.07107928 mass_center=(0 0 0) inertia=(0.001053089 0.0008684676 0.0008684676 0 0 0)
                meshes=l_talus.vtp
            Body calcn_l: mass=0.888491 mass_center=(0.09808616 0.04531432 0)
                inertia=(0.001474324 0.002925471 0.002925471 0 0 0) meshes=l_foot.vtp
            Body toes_l: mass=0.1539577 mass_center=(0.03393781 0.009062865 0.01716508)
                inertia=(0.0001053089 0.0001552314 0.0001552314 0 0 0) meshes=l_bofoot.vtp
            Body torso: mass=24.33513 mass_center=(-0.03481475 0.2692358 0)
                inertia=(0.9134465 0.723205 0.9134465 0 0 0)
                meshes=(hat_spine.vtp hat_jaw.vtp hat_skull.vtp hat_ribs_scap.vtp)
          JointSet:
            CustomJoint ground_pelvis: socket_parent_frame=ground_offset socket_child_frame=pelvis_offset
              Coordinate pelvis_tilt: default_value=0.1549532 range=(-1.570796 1.570796) clamped=true
              Coordinate pelvis_list: default_value=0.04387046 range=(-1.570796 1.570796) clamped=true
              Coordinate pelvis_rotation: default_value=0.05738015 range=(-1.570796 1.570796) clamped=true
              Coordinate pelvis_tx: default_value=-0.1532571 range=(-5 5) clamped=true
              Coordinate pelvis_ty: default_value=0.9488154 range=(-1 2) clamped=true
              Coordinate pelvis_tz: default_value=-0.570079 range=(-3 3) clamped=true
              PhysicalOffsetFrame ground_offset: socket_parent=/ground translation=(0 0 0) [meters]
              PhysicalOffsetFrame pelvis_offset: socket_parent=/bodyset/pelvis translation=(0 0 0)
              SpatialTransform:
                TransformAxis rotation1: coordinates=pelvis_tilt axis=(0 0 1) LinearFunction(coefficients=1 0)
                TransformAxis rotation2: coordinates=pelvis_list axis=(1 0 0) LinearFunction(coefficients=1 0)
                TransformAxis rotation3: coordinates=pelvis_rotation axis=(0 1 0) LinearFunction(coefficients=1 0)
                TransformAxis translation1: coordinates=pelvis_tx axis=(1 0 0) LinearFunction(coefficients=1 0)
                TransformAxis translation2: coordinates=pelvis_ty axis=(0 1 0) LinearFunction(coefficients=1 0)
                TransformAxis translation3: coordinates=pelvis_tz axis=(0 0 1) LinearFunction(coefficients=1 0)
            CustomJoint hip_r: socket_parent_frame=pelvis_offset socket_child_frame=femur_r_offset
              Coordinate hip_flexion_r: default_value=-0.2298812 range=(-0.5235988 2.094395) clamped=true
              Coordinate hip_adduction_r: default_value=-0.1796512 range=(-0.8726646 0.5235988) clamped=true
              Coordinate hip_rotation_r: default_value=-0.2195626 range=(-0.6981317 0.6981317) clamped=true
              PhysicalOffsetFrame pelvis_offset: socket_parent=/bodyset/pelvis
                  translation=(-0.05884377 -0.08148911 0.09047876)
              PhysicalOffsetFrame femur_r_offset: socket_parent=/bodyset/femur_r translation=(0 0 0)
              SpatialTransform: axes_held_at_zero=(translation1 translation2 translation3)
                TransformAxis rotation1: coordinates=hip_flexion_r axis=(0 0 1) LinearFunction(coefficients=1 0)
                TransformAxis rotation2: coordinates=hip_adduction_r axis=(1 0 0) LinearFunction(coefficients=1 0)
                TransformAxis rotation3: coordinates=hip_rotation_r axis=(0 1 0) LinearFunction(coefficients=1 0)
            CustomJoint walker_knee_r: socket_parent_frame=femur_r_offset socket_child_frame=tibia_r_offset
              Coordinate knee_angle_r: default_value=0.04324453 range=(0 2.0944) clamped=true
              PhysicalOffsetFrame femur_r_offset: socket_parent=/bodyset/femur_r
                  translation=(-0.007650541 -0.3857991 -0.002600616) orientation=(-1.64157 1.44618 1.5708) [radians]
              PhysicalOffsetFrame tibia_r_offset: socket_parent=/bodyset/tibia_r
                  translation=(-0.008337125 -0.003642984 -0.001530181) orientation=(-1.64157 1.44618 1.5708)
              SpatialTransform: axes_held_at_zero=translation3
                TransformAxis rotation1: coordinates=knee_angle_r axis=(1 0 0) LinearFunction(coefficients=1 0)
                TransformAxis rotation2: coordinates=knee_angle_r axis=(0 0 1)
                  SimmSpline: x=(0 0.174533 0.349066 0.523599 0.698132 0.872665 1.0472 1.22173 1.39626 1.5708 1.74533 1.91986 2.0944)
                      y=(0 0.0126809 0.0226969 0.0296054 0.0332049 0.0335354 0.0308779 0.0257548 0.0189295 0.011407 0.00443314 -0.00050475 -0.0016782)
                TransformAxis rotation3: coordinates=knee_angle_r axis=(0 1 0)
                  SimmSpline: x=(0 0.174533 0.349066 0.523599 0.698132 0.872665 1.0472 1.22173 1.39626 1.5708 1.74533 1.91986 2.0944)
                      y=(0 0.059461 0.109399 0.150618 0.18392 0.210107 0.229983 0.24435 0.254012 0.25977 0.262428 0.262788 0.261654)
                TransformAxis translation1: coordinates=knee_angle_r axis=(0 1 0)
                  MultiplierFunction: scale=0.9456787
                    SimmSpline: x=(0 0.174533 0.349066 0.523599 0.698132 0.872665 1.0472 1.22173 1.39626 1.5708 1.74533 1.91986 2.0944)
                        y=(0 0.000479 0.000835 0.001086 0.001251 0.001346 0.001391 0.001403 0.0014 0.0014 0.001421 0.001481 0.001599)
                TransformAxis translation2: coordinates=knee_angle_r axis=(0 0 1)
                  MultiplierFunction: scale=0.9456787
                    SimmSpline: x=(0 0.174533 0.349066 0.523599 0.698132 0.872665 1.0472 1.22173 1.39626 1.5708 1.74533 1.91986 2.0944)
                        y=(0 0.000988 0.001899 0.002734 0.003492 0.004173 0.004777 0.005305 0.005756 0.00613 0.006427 0.006648 0.006792)
            CustomJoint patellofemoral_r: socket_parent_frame=femur_r_offset socket_child_frame=patella_r_offset
              Coordinate knee_angle_r_beta: default_value=0.04324453 range=(-99999.9 99999.9) clamped=false
              PhysicalOffsetFrame femur_r_offset: socket_parent=/bodyset/femur_r
                  translation=(-0.007650541 -0.3857991 -0.002600616)
              PhysicalOffsetFrame patella_r_offset: socket_parent=/bodyset/patella_r translation=(0 0 0)
              SpatialTransform: axes_held_at_zero=(rotation2 rotation3)
                TransformAxis rotation1: coordinates=knee_angle_r_beta axis=(0 0 1)
                  SimmSpline: x=(0 0.174533 0.349066 0.523599 0.698132 0.872665 1.0472 1.22173 1.39626 1.5708 1.74533 1.91986 2.0944)
                      y=(0.00113686 -0.00629212 -0.105582 -0.253683 -0.414245 -0.579047 -0.747244 -0.91799 -1.09044 -1.26379 -1.43763 -1.61186 -1.78634)
                TransformAxis translation1: coordinates=knee_angle_r_beta axis=(1 0 0)
                  MultiplierFunction: scale=0.9456787
                    SimmSpline: x=(0 0.174533 0.349066 0.523599 0.698132 0.872665 1.0472 1.22173 1.39626 1.5708 1.74533 1.91986 2.0944)
                        y=(0.0524 0.0488 0.0437 0.0371 0.0296 0.0216 0.0136 0.0057 -0.0019 -0.0088 -0.0148 -0.0196 -0.0227)
                TransformAxis translation2: coordinates=knee_angle_r_beta axis=(0 1 0)
                  MultiplierFunction: scale=0.9456787
                    SimmSpline: x=(0 0.174533 0.349066 0.523599 0.698132 0.872665 1.0472 1.22173 1.39626 1.5708 1.74533 1.91986 2.0944)
                        y=(-0.0108 -0.019 -0.0263 -0.0322 -0.0367 -0.0395 -0.0408 -0.0404 -0.0384 -0.0349 -0.0301 -0.0245 -0.0187)
                TransformAxis translation3: axis=(0 0 1) MultiplierFunction(scale=0.9456787, Constant(value=0.00275))
            PinJoint ankle_r: socket_parent_frame=tibia_r_offset socket_child_frame=talus_r_offset
              Coordinate ankle_angle_r: default_value=0.03443734 range=(-0.6981317 0.5235988) clamped=true
              PhysicalOffsetFrame tibia_r_offset: socket_parent=/bodyset/tibia_r translation=(-0.01030606 -0.4122422 0)
                  orientation=(0.175895 -0.105208 0.0186622)
              PhysicalOffsetFrame talus_r_offset: socket_parent=/bodyset/talus_r translation=(0 0 0)
                  orientation=(0.175895 -0.105208 0.0186622)
            PinJoint subtalar_r: socket_parent_frame=talus_r_offset socket_child_frame=calcn_r_offset
              Coordinate subtalar_angle_r: default_value=-0.01291475 range=(-0.3490659 0.3490659) clamped=true
              PhysicalOffsetFrame talus_r_offset: socket_parent=/bodyset/talus_r
                  translation=(-0.04783662 -0.06336453 0.007768424) orientation=(-1.76819 0.906223 1.8196)
              PhysicalOffsetFrame calcn_r_offset: socket_parent=/bodyset/calcn_r translation=(0 0 0)
                  orientation=(-1.76819 0.906223 1.8196)
            PinJoint mtp_r: socket_parent_frame=calcn_r_offset socket_child_frame=toes_r_offset
              Coordinate mtp_angle_r: default_value=0 range=(-0.5235988 0.5235988) clamped=true
              PhysicalOffsetFrame calcn_r_offset: socket_parent=/bodyset/calcn_r
                  translation=(0.1753781 -0.003020955 0.001059331) orientation=(-3.14159 0.619901 0)
              PhysicalOffsetFrame toes_r_offset: socket_parent=/bodyset/toes_r translation=(0 0 0)
                  orientation=(-3.14159 0.619901 0)
            CustomJoint hip_l: socket_parent_frame=pelvis_offset socket_child_frame=femur_l_offset
              Coordinate hip_flexion_l: default_value=-0.2330429 range=(-0.5235988 2.094395) clamped=true
              Coordinate hip_adduction_l: default_value=-0.05309023 range=(-0.8726646 0.5235988) clamped=true
              Coordinate hip_rotation_l: default_value=-0.00565264 range=(-0.6981317 0.6981317) clamped=true
              PhysicalOffsetFrame pelvis_offset: socket_parent=/bodyset/pelvis
                  translation=(-0.05884377 -0.08148911 -0.09047876)
              PhysicalOffsetFrame femur_l_offset: socket_parent=/bodyset/femur_l translation=(0 0 0)
              SpatialTransform: axes_held_at_zero=(translation1 translation2 translation3)
                TransformAxis rotation1: coordinates=hip_flexion_l axis=(0 0 1) LinearFunction(coefficients=1 0)
                TransformAxis rotation2: coordinates=hip_adduction_l axis=(1 0 0) LinearFunction(coefficients=-1 0)
                TransformAxis rotation3: coordinates=hip_rotation_l axis=(0 1 0) LinearFunction(coefficients=-1 0)
            CustomJoint walker_knee_l: socket_parent_frame=femur_l_offset socket_child_frame=tibia_l_offset
              Coordinate knee_angle_l: default_value=0.02683549 range=(0 2.0944) clamped=true
              PhysicalOffsetFrame femur_l_offset: socket_parent=/bodyset/femur_l
                  translation=(-0.007650541 -0.3857991 0.002600616) orientation=(1.64157 -1.44618 1.5708)
              PhysicalOffsetFrame tibia_l_offset: socket_parent=/bodyset/tibia_l
                  translation=(-0.008337125 -0.003642984 0.001530181) orientation=(1.64157 -1.44618 1.5708)
              SpatialTransform: axes_held_at_zero=translation3
                TransformAxis rotation1: coordinates=knee_angle_l axis=(-1 0 0) LinearFunction(coefficients=1 0)
                TransformAxis rotation2: coordinates=knee_angle_l axis=(0 0 1)
                  SimmSpline: x=(0 0.174533 0.349066 0.523599 0.698132 0.872665 1.0472 1.22173 1.39626 1.5708 1.74533 1.91986 2.0944)
                      y=(0 0.0126809 0.0226969 0.0296054 0.0332049 0.0335354 0.0308779 0.0257548 0.0189295 0.011407 0.00443314 -0.00050475 -0.0016782)
                TransformAxis rotation3: coordinates=knee_angle_l axis=(0 1 0)
                  SimmSpline: x=(0 0.174533 0.349066 0.523599 0.698132 0.872665 1.0472 1.22173 1.39626 1.5708 1.74533 1.91986 2.0944)
                      y=(0 -0.059461 -0.109399 -0.150618 -0.18392 -0.210107 -0.229983 -0.24435 -0.254012 -0.25977 -0.262428 -0.262788 -0.261654)
                TransformAxis translation1: coordinates=knee_angle_l axis=(0 1 0)
                  MultiplierFunction: scale=0.9456787
                    SimmSpline: x=(0 0.174533 0.349066 0.523599 0.698132 0.872665 1.0472 1.22173 1.39626 1.5708 1.74533 1.91986 2.0944)
                        y=(0 0.000479 0.000835 0.001086 0.001251 0.001346 0.001391 0.001403 0.0014 0.0014 0.001421 0.001481 0.001599)
                TransformAxis translation2: coordinates=knee_angle_l axis=(0 0 1)
                  MultiplierFunction: scale=0.9456787
                    SimmSpline: x=(0 0.174533 0.349066 0.523599 0.698132 0.872665 1.0472 1.22173 1.39626 1.5708 1.74533 1.91986 2.0944)
                        y=(0 -0.000988 -0.001899 -0.002734 -0.003492 -0.004173 -0.004777 -0.005305 -0.005756 -0.00613 -0.006427 -0.006648 -0.006792)
            CustomJoint patellofemoral_l: socket_parent_frame=femur_l_offset socket_child_frame=patella_l_offset
              Coordinate knee_angle_l_beta: default_value=0.02683549 range=(-99999.9 99999.9) clamped=false
              PhysicalOffsetFrame femur_l_offset: socket_parent=/bodyset/femur_l
                  translation=(-0.007650541 -0.3857991 0.002600616)
              PhysicalOffsetFrame patella_l_offset: socket_parent=/bodyset/patella_l translation=(0 0 0)
              SpatialTransform: axes_held_at_zero=(rotation2 rotation3)
                TransformAxis rotation1: coordinates=knee_angle_l_beta axis=(0 0 1)
                  SimmSpline: x=(0 0.174533 0.349066 0.523599 0.698132 0.872665 1.0472 1.22173 1.39626 1.5708 1.74533 1.91986 2.0944)
                      y=(0.00113686 -0.00629212 -0.105582 -0.253683 -0.414245 -0.579047 -0.747244 -0.91799 -1.09044 -1.26379 -1.43763 -1.61186 -1.78634)
                TransformAxis translation1: coordinates=knee_angle_l_beta axis=(1 0 0)
                  MultiplierFunction: scale=0.9456787
                    SimmSpline: x=(0 0.174533 0.349066 0.523599 0.698132 0.872665 1.0472 1.22173 1.39626 1.5708 1.74533 1.91986 2.0944)
                        y=(0.0524 0.0488 0.0437 0.0371 0.0296 0.0216 0.0136 0.0057 -0.0019 -0.0088 -0.0148 -0.0196 -0.0227)
                TransformAxis translation2: coordinates=knee_angle_l_beta axis=(0 1 0)
                  MultiplierFunction: scale=0.9456787
                    SimmSpline: x=(0 0.174533 0.349066 0.523599 0.698132 0.872665 1.0472 1.22173 1.39626 1.5708 1.74533 1.91986 2.0944)
                        y=(-0.0108 -0.019 -0.0263 -0.0322 -0.0367 -0.0395 -0.0408 -0.0404 -0.0384 -0.0349 -0.0301 -0.0245 -0.0187)
                TransformAxis translation3: axis=(0 0 1) MultiplierFunction(scale=0.9456787, Constant(value=-0.00275))
            PinJoint ankle_l: socket_parent_frame=tibia_l_offset socket_child_frame=talus_l_offset
              Coordinate ankle_angle_l: default_value=0.07509473 range=(-0.6981317 0.5235988) clamped=true
              PhysicalOffsetFrame tibia_l_offset: socket_parent=/bodyset/tibia_l translation=(-0.01030606 -0.4122422 0)
                  orientation=(-0.175895 0.105208 0.0186622)
              PhysicalOffsetFrame talus_l_offset: socket_parent=/bodyset/talus_l translation=(0 0 0)
                  orientation=(-0.175895 0.105208 0.0186622)
            PinJoint subtalar_l: socket_parent_frame=talus_l_offset socket_child_frame=calcn_l_offset
              Coordinate subtalar_angle_l: default_value=-0.02937409 range=(-0.3490659 0.3490659) clamped=true
              PhysicalOffsetFrame talus_l_offset: socket_parent=/bodyset/talus_l
                  translation=(-0.04783662 -0.06336453 -0.007768424) orientation=(1.76819 -0.906223 1.8196)
              PhysicalOffsetFrame calcn_l_offset: socket_parent=/bodyset/calcn_l translation=(0 0 0)
                  orientation=(1.76819 -0.906223 1.8196)
            PinJoint mtp_l: socket_parent_frame=calcn_l_offset socket_child_frame=toes_l_offset
              Coordinate mtp_angle_l: default_value=0 range=(-0.5235988 0.5235988) clamped=true
              PhysicalOffsetFrame calcn_l_offset: socket_parent=/bodyset/calcn_l
                  translation=(0.1753781 -0.003020955 -0.001059331) orientation=(-3.14159 -0.619901 0)
              PhysicalOffsetFrame toes_l_offset: socket_parent=/bodyset/toes_l translation=(0 0 0)
                  orientation=(-3.14159 -0.619901 0)
            CustomJoint back: socket_parent_frame=pelvis_offset socket_child_frame=torso_offset
              Coordinate lumbar_extension: default_value=-0.1775657 range=(-1.570796 1.570796) clamped=true
              Coordinate lumbar_bending: default_value=-0.05811596 range=(-1.570796 1.570796) clamped=true
              Coordinate lumbar_rotation: default_value=-0.05324434 range=(-1.570796 1.570796) clamped=true
              PhysicalOffsetFrame pelvis_offset: socket_parent=/bodyset/pelvis translation=(-0.1052948 0.08461412 0)
              PhysicalOffsetFrame torso_offset: socket_parent=/bodyset/torso translation=(0 0 0)
              SpatialTransform: axes_held_at_zero=(translation1 translation2 translation3)
                TransformAxis rotation1: coordinates=lumbar_extension axis=(0 0 1) LinearFunction(coefficients=1 0)
                TransformAxis rotation2: coordinates=lumbar_bending axis=(1 0 0) LinearFunction(coefficients=1 0)
                TransformAxis rotation3: coordinates=lumbar_rotation axis=(0 1 0) LinearFunction(coefficients=1 0)
          ConstraintSet:
            CoordinateCouplerConstraint patellofemoral_knee_angle_r_con: independent_coordinate_names=knee_angle_r
                dependent_coordinate_name=knee_angle_r_beta scale_factor=1
                coupled_coordinates_function=LinearFunction(coefficients=1 0)
            CoordinateCouplerConstraint patellofemoral_knee_angle_l_con: independent_coordinate_names=knee_angle_l
                dependent_coordinate_name=knee_angle_l_beta scale_factor=1
                coupled_coordinates_function=LinearFunction(coefficients=1 0)
          ForceSet:
            DeGrooteFregly2016Muscle [values shared by the 40 below unless stated]: min_control=0.01 max_control=1
                max_contraction_velocity=25 ignore_tendon_compliance=true ignore_activation_dynamics=true
                activation_time_constant=0.01 deactivation_time_constant=0.04 default_activation=0.01
                active_force_width_scale=1.5 fiber_damping=0.01 tendon_strain_at_one_norm_force=0.049
                ignore_passive_fiber_force=true
            DeGrooteFregly2016Muscle addbrev_r: max_isometric_force=938.7295 optimal_fiber_length=0.1041521
                tendon_slack_length=0.03581204 pennation_angle_at_optimal=0.1147809 [radians]
                passive_fiber_strain_at_one_norm_force=0.5015522
              PathPoint P1: pelvis (-0.0199715 -0.09759174 0.01803485)
              PathPoint P2: femur_r (-0.001891357 -0.1115901 0.0235474)
              PathWrap: wrap_object=AB_at_femshaft_r method=hybrid
            DeGrooteFregly2016Muscle addlong_r: max_isometric_force=1375.2 optimal_fiber_length=0.1041973
                tendon_slack_length=0.1269236 pennation_angle_at_optimal=0.1377704
                passive_fiber_strain_at_one_norm_force=0.5002995
              PathPoint P1: pelvis (-0.007925862 -0.09229687 0.02211026)
              PathPoint P2: femur_r (0.01064834 -0.2263671 0.01497009)
              PathWrap: wrap_object=AL_at_femshaft_r method=hybrid
            DeGrooteFregly2016Muscle addmagDist_r: max_isometric_force=895.9426 optimal_fiber_length=0.166142
                tendon_slack_length=0.0819278 pennation_angle_at_optimal=0.194705
                passive_fiber_strain_at_one_norm_force=0.7
              PathPoint P1: pelvis (-0.07741831 -0.1325483 0.04663298)
              PathPoint P2: femur_r (0.01063889 -0.2482407 0.0182516)
              PathWrap: wrap_object=AMdist_at_femshaft_r method=hybrid
            DeGrooteFregly2016Muscle addmagIsch_r: max_isometric_force=895.9426 optimal_fiber_length=0.1457528
                tendon_slack_length=0.2018732 pennation_angle_at_optimal=0.1680443
                passive_fiber_strain_at_one_norm_force=0.7000392
              PathPoint P1: pelvis (-0.0937092 -0.1347181 0.04884635)
              PathPoint P2: femur_r (0.004548714 -0.366895 -0.03095206)
              PathWrap: wrap_object=AMisch_at_condyles_r method=hybrid
            DeGrooteFregly2016Muscle addmagMid_r: max_isometric_force=895.9426 optimal_fiber_length=0.1332204
                tendon_slack_length=0.04511082 pennation_angle_at_optimal=0.2073076
                passive_fiber_strain_at_one_norm_force=0.7
              PathPoint P1: pelvis (-0.05506278 -0.1253639 0.03342304)
              PathPoint P2: femur_r (0.002288542 -0.1535782 0.02763273)
              PathWrap: wrap_object=AMmid_at_femshaft_r method=hybrid
            DeGrooteFregly2016Muscle addmagProx_r: max_isometric_force=895.9426 optimal_fiber_length=0.1105461
                tendon_slack_length=0.0422128 pennation_angle_at_optimal=0.3114833
                passive_fiber_strain_at_one_norm_force=0.7
              PathPoint P1: pelvis (-0.03239356 -0.1116595 0.01598544)
              PathPoint P2: femur_r (-0.01444051 -0.07457622 0.03028063)
              PathWrap: wrap_object=AMprox_at_femshaft_r method=hybrid
            DeGrooteFregly2016Muscle bflh_r: max_isometric_force=1969.775 optimal_fiber_length=0.09249728
                tendon_slack_length=0.3082232 pennation_angle_at_optimal=0.1759182
                passive_fiber_strain_at_one_norm_force=0.7068715
              PathPoint P1: pelvis (-0.1087453 -0.1236508 0.06862614)
              PathPoint P2: tibia_r (-0.03473141 -0.03607119 0.02607432)
              PathPoint P3: tibia_r (-0.02957838 -0.04689255 0.03122735)
            DeGrooteFregly2016Muscle bfsh_r: max_isometric_force=835.6721 optimal_fiber_length=0.1059788
                tendon_slack_length=0.1016716 pennation_angle_at_optimal=0.2642232
                passive_fiber_strain_at_one_norm_force=0.6888986
              PathPoint P1: femur_r (0.004728393 -0.1996328 0.02212888)
              PathPoint P2: tibia_r (-0.03102123 -0.04318237 0.03277326)
              PathWrap: wrap_object=BF_at_gastroc_r method=hybrid
            DeGrooteFregly2016Muscle edl_r: max_isometric_force=905.2472 optimal_fiber_length=0.07190159
                tendon_slack_length=0.3827232 pennation_angle_at_optimal=0.2182582
                passive_fiber_strain_at_one_norm_force=0.7072192
              PathPoint P1: tibia_r (-0.01648969 -0.1192411 0.02112741)
              PathPoint P2: tibia_r (0.01690193 -0.3875077 0.01154278)
              PathPoint P3: calcn_r (0.09014118 0.05437719 0.0007846893)
              PathPoint P4: calcn_r (0.1585072 0.008307626 0.0127512)
              PathPoint P5: toes_r (0.0002942585 0.007099244 0.01500718)
              PathPoint P6: toes_r (0.04345217 -0.000604191 0.02452154)
            DeGrooteFregly2016Muscle ehl_r: max_isometric_force=428.8013 optimal_fiber_length=0.0771762
                tendon_slack_length=0.3371767 pennation_angle_at_optimal=0.1972681
                passive_fiber_strain_at_one_norm_force=0.7178208
              PathPoint P1: tibia_r (-0.01442848 -0.1597439 0.01947844)
              PathPoint P2: tibia_r (0.007317299 -0.2998031 0.01690193)
              PathPoint P3: tibia_r (0.02061211 -0.3806026 -0.002885695)
              PathPoint P4: calcn_r (0.09514358 0.05875757 -0.02069618)
              PathPoint P5: calcn_r (0.1268254 0.04667375 -0.02520814)
              PathPoint P6: calcn_r (0.1700814 0.02099564 -0.02746413)
              PathPoint P7: toes_r (0.02922968 0.006192957 -0.02403111)
              PathPoint P8: toes_r (0.05522251 0.005135623 -0.01824403)
            DeGrooteFregly2016Muscle fdl_r: max_isometric_force=634.7656 optimal_fiber_length=0.04632818
                tendon_slack_length=0.3934497 pennation_angle_at_optimal=0.2248391
                passive_fiber_strain_at_one_norm_force=0.6997089
              PathPoint P1: tibia_r (-0.002370393 -0.1888069 -0.00185509)
              PathPoint P2: tibia_r (-0.01813866 -0.3756557 -0.01277951)
              PathPoint P3: calcn_r (0.04276557 0.04758004 -0.02746413)
              PathPoint P4: calcn_r (0.069445 0.0265844 -0.02579666)
              PathPoint P5: calcn_r (0.1626269 -0.01223487 0.01137799)
              PathPoint P6: toes_r (-0.001863637 -0.01178172 0.01441867)
              PathPoint P7: toes_r (0.02795456 -0.01072439 0.02108853)
              PathPoint P8: toes_r (0.043256 -0.009062865 0.02373685)
            DeGrooteFregly2016Muscle fhl_r: max_isometric_force=1361.759 optimal_fiber_length=0.05464671
                tendon_slack_length=0.3674288 pennation_angle_at_optimal=0.2580255
                passive_fiber_strain_at_one_norm_force=0.7002505
              PathPoint P1: tibia_r (-0.03194877 -0.22292 0.02061211)
              PathPoint P2: tibia_r (-0.02494065 -0.3783353 -0.007832602)
              PathPoint P3: calcn_r (0.03668422 0.04168918 -0.02363877)
              PathPoint P4: calcn_r (0.1018134 0.01027125 -0.02511006)
              PathPoint P5: calcn_r (0.1692967 -0.00800553 -0.02638518)
              PathPoint P6: toes_r (0.01520336 -0.009667056 -0.02599283)
              PathPoint P7: toes_r (0.05512442 -0.01540687 -0.0177536)
            DeGrooteFregly2016Muscle gaslat_r: max_isometric_force=2362.589 optimal_fiber_length=0.06108995
                tendon_slack_length=0.3907161 pennation_angle_at_optimal=0.2102268
                passive_fiber_strain_at_one_norm_force=0.7435102
              PathPoint P1: femur_r (-0.002837036 -0.3606819 0.0261953)
              PathPoint P2: calcn_r (0.004315791 0.0468248 -0.005198567)
              PathWrap: wrap_object=GasLat_at_shank_r method=hybrid
              PathWrap pathwrap_0: wrap_object=Gastroc_at_condyles_r method=hybrid
            DeGrooteFregly2016Muscle gasmed_r: max_isometric_force=4673.272 optimal_fiber_length=0.05288857
                tendon_slack_length=0.4134811 pennation_angle_at_optimal=0.1656816
                passive_fiber_strain_at_one_norm_force=0.7902371
              PathPoint P1: femur_r (0.00756543 -0.3582231 -0.01967012)
              PathPoint P2: calcn_r (0.004315791 0.0468248 -0.005198567)
              PathWrap: wrap_object=GasMed_at_shank_r method=hybrid
              PathWrap pathwrap_0: wrap_object=Gastroc_at_condyles_r method=hybrid
            DeGrooteFregly2016Muscle glmax1_r: max_isometric_force=1475.675 optimal_fiber_length=0.1492864
                tendon_slack_length=0.04960055 pennation_angle_at_optimal=0.3540118
                passive_fiber_strain_at_one_norm_force=0.8468075
              PathPoint P1: pelvis (-0.1287168 0.03581825 0.06593262)
              PathPoint P2: pelvis (-0.1314355 -0.02512468 0.09122826)
              PathPoint P3: femur_r (-0.04198813 -0.03082913 0.0285595)
              PathPoint P4: femur_r (-0.0261953 -0.05352541 0.0444469)
              PathWrap: wrap_object=Gmax1_at_pelvis_r method=hybrid
            DeGrooteFregly2016Muscle glmax2_r: max_isometric_force=2109.069 optimal_fiber_length=0.15849
                tendon_slack_length=0.06853144 pennation_angle_at_optimal=0.3673821
                passive_fiber_strain_at_one_norm_force=0.7164175
              PathPoint P1: pelvis (-0.1377092 0.009032427 0.05410456)
              PathPoint P2: pelvis (-0.1405324 -0.06322699 0.09520998)
              PathPoint P3: femur_r (-0.04255554 -0.05522764 0.0238311)
              PathPoint P4: femur_r (-0.01475259 -0.09608095 0.03962394)
              PathWrap: wrap_object=Gmax2_at_pelvis_r method=hybrid
            DeGrooteFregly2016Muscle glmax3_r: max_isometric_force=1421.631 optimal_fiber_length=0.1687066
                tendon_slack_length=0.07042906 pennation_angle_at_optimal=0.3824161
                passive_fiber_strain_at_one_norm_force=0.7121937
              PathPoint P1: pelvis (-0.1359317 -0.05450603 0.01053985)
              PathPoint P2: pelvis (-0.1331085 -0.1311259 0.05094261)
              PathPoint P3: femur_r (-0.02657357 -0.1063889 0.00888938)
              PathPoint P4: femur_r (-0.005674072 -0.1341918 0.03886739)
              PathWrap: wrap_object=Gmax3_at_pelvis_r method=hybrid
            DeGrooteFregly2016Muscle glmed1_r: max_isometric_force=1640.2 optimal_fiber_length=0.07761316
                tendon_slack_length=0.05934412 pennation_angle_at_optimal=0.3165559
                passive_fiber_strain_at_one_norm_force=0.7
              PathPoint P1: pelvis (-0.05137946 0.02715257 0.1350136)
              PathPoint P2_0: femur_r (-0.01313714 -0.01730091 0.05597436)
            DeGrooteFregly2016Muscle glmed2_r: max_isometric_force=1147.637 optimal_fiber_length=0.08612144
                tendon_slack_length=0.07697701 pennation_angle_at_optimal=0.3165559
                passive_fiber_strain_at_one_norm_force=0.7014005
              PathPoint P1: pelvis (-0.08859328 0.05672148 0.09601045)
              PathPoint P2_0: femur_r (-0.02083899 -0.009418106 0.05307737)
            DeGrooteFregly2016Muscle glmed3_r: max_isometric_force=1306.799 optimal_fiber_length=0.079961
                tendon_slack_length=0.04954607 pennation_angle_at_optimal=0.3165559
                passive_fiber_strain_at_one_norm_force=0.7030514
              PathPoint P1: pelvis (-0.1044225 0.01615391 0.07483484)
              PathPoint P2_0: femur_r (-0.02922147 -0.00444469 0.04898616)
            DeGrooteFregly2016Muscle glmin1_r: max_isometric_force=561.0689 optimal_fiber_length=0.08262344
                tendon_slack_length=0.01960822 pennation_angle_at_optimal=0.1745329
                passive_fiber_strain_at_one_norm_force=0.7
              PathPoint P1: pelvis (-0.0309292 -0.0001123516 0.1387214)
              PathPoint P2: femur_r (0.005191132 -0.01464724 0.05299376)
            DeGrooteFregly2016Muscle glmin2_r: max_isometric_force=592.2295 optimal_fiber_length=0.0694749
                tendon_slack_length=0.03237909 pennation_angle_at_optimal=0
                passive_fiber_strain_at_one_norm_force=0.7000285
              PathPoint P1: pelvis (-0.0644107 0.01038238 0.1184507)
              PathPoint P2: femur_r (0.003351051 -0.008522711 0.0496144)
            DeGrooteFregly2016Muscle glmin3_r: max_isometric_force=670.1607 optimal_fiber_length=0.03551628
                tendon_slack_length=0.04754742 pennation_angle_at_optimal=0.01745329
                passive_fiber_strain_at_one_norm_force=0.7002322
              PathPoint P1: pelvis (-0.08250007 -0.01609226 0.09345334)
              PathPoint P2: femur_r (-0.003381877 -0.001197892 0.04847705)
            DeGrooteFregly2016Muscle grac_r: max_isometric_force=421.9672 optimal_fiber_length=0.2168767
                tendon_slack_length=0.1637656 pennation_angle_at_optimal=0.1720016
                passive_fiber_strain_at_one_norm_force=0.8027483
              PathPoint P1: pelvis (-0.04952095 -0.1342613 0.02876208)
              PathPoint P2: tibia_r (-0.01898375 -0.04900529 -0.03051623)
              PathPoint P3: tibia_r (0.001834478 -0.07175076 -0.01621142)
              PathWrap: wrap_object=GR_at_condyles_r method=hybrid
            DeGrooteFregly2016Muscle iliacus_r: max_isometric_force=1531.711 optimal_fiber_length=0.1083338
                tendon_slack_length=0.09768404 pennation_angle_at_optimal=0.279914
                passive_fiber_strain_at_one_norm_force=0.5005449
              PathPoint P1: pelvis (-0.06326051 0.03208069 0.09872326)
              PathPoint P2: pelvis (-0.01411598 -0.0578283 0.08853474)
              PathPoint P3: femur_r (-0.002175061 -0.05343085 0.01314493)
              PathPoint P4: femur_r (-0.01153728 -0.06023973 0.0185353)
              PathWrap: wrap_object=IL_at_brim_r method=hybrid range=(2 3)
            DeGrooteFregly2016Muscle perbrev_r: max_isometric_force=781.8024 optimal_fiber_length=0.04780799
                tendon_slack_length=0.1553523 pennation_angle_at_optimal=0.2052361
                passive_fiber_strain_at_one_norm_force=0.6987541
              PathPoint P1: tibia_r (-0.02504371 -0.2609493 0.0258682)
              PathPoint P2: tibia_r (-0.03493753 -0.4012147 0.02566208)
              PathPoint P3: tibia_r (-0.02937226 -0.4126544 0.02628044)
              PathPoint P4: calcn_r (0.04619858 0.04078289 0.02285408)
              PathPoint P5: calcn_r (0.06640433 0.03307946 0.03364355)
            DeGrooteFregly2016Muscle perlong_r: max_isometric_force=1673.057 optimal_fiber_length=0.05321339
                tendon_slack_length=0.3480038 pennation_angle_at_optimal=0.2479525
                passive_fiber_strain_at_one_norm_force=0.6924185
              PathPoint P1: tibia_r (-0.02061211 -0.1415021 0.02906308)
              PathPoint P2: tibia_r (-0.03267019 -0.4019362 0.02442535)
              PathPoint P3: tibia_r (-0.02803247 -0.4136851 0.02473453)
              PathPoint P4: calcn_r (0.04296174 0.03474098 0.02167704)
              PathPoint P5: calcn_r (0.06679668 0.01601106 0.02785647)
              PathPoint P6: calcn_r (0.08356941 0.01042229 0.01157417)
              PathPoint P7: calcn_r (0.1179977 0.01283906 -0.01804785)
            DeGrooteFregly2016Muscle piri_r: max_isometric_force=1544.68 optimal_fiber_length=0.02789934
                tendon_slack_length=0.1233003 pennation_angle_at_optimal=0.1745329
                passive_fiber_strain_at_one_norm_force=0.7028348
              PathPoint P1: pelvis (-0.1064554 -0.006779512 0.01582149)
              PathPoint P2: pelvis (-0.106675 -0.03183152 0.07134308)
              PathPoint P3: femur_r (-0.01399604 -0.003404443 0.04132616)
            DeGrooteFregly2016Muscle psoas_r: max_isometric_force=2140.185 optimal_fiber_length=0.1195349
                tendon_slack_length=0.1017869 pennation_angle_at_optimal=0.2155251
                passive_fiber_strain_at_one_norm_force=0.5010382
              PathPoint P1: pelvis (-0.06336507 0.06436902 0.04567268)
              PathPoint P2: pelvis (-0.02143538 -0.06789894 0.0768238)
              PathPoint P3: femur_r (-0.01248296 -0.04416319 0.004350122)
              PathPoint P4: femur_r (-0.02222345 -0.04955356 0.008321972)
              PathWrap: wrap_object=PS_at_brim_r method=hybrid range=(2 3)
            DeGrooteFregly2016Muscle recfem_r: max_isometric_force=3287.611 optimal_fiber_length=0.07290425
                tendon_slack_length=0.4307916 pennation_angle_at_optimal=0.2170149
                passive_fiber_strain_at_one_norm_force=0.8999622
              PathPoint P1: pelvis (-0.02509508 -0.04028255 0.1092631)
              PathPoint P2: patella_r (0.009456787 0.04633826 0.0006619751)
              PathPoint P3: patella_r (0.01144271 0.04132616 -0.0009456787)
              PathPoint P4: patella_r (0.004728393 0.002335826 2.837036e-5)
              PathPoint P5: tibia_r (0.03359774 -0.06505182 -0.0004843846)
              PathWrap: wrap_object=KnExt_at_fem_r method=hybrid
            DeGrooteFregly2016Muscle sart_r: max_isometric_force=374.1197 optimal_fiber_length=0.3922317
                tendon_slack_length=0.1206865 pennation_angle_at_optimal=0.02613542
                passive_fiber_strain_at_one_norm_force=0.7212821
              PathPoint P1: pelvis (-0.02038975 -0.01619608 0.1236676)
              PathPoint P2: femur_r (-0.002837036 -0.3374182 -0.03981307)
              PathPoint P3: tibia_r (-0.0258682 -0.04132728 -0.0376171)
              PathPoint P4: tibia_r (-0.01638663 -0.06173327 -0.02720799)
              PathPoint P5: tibia_r (0.01401623 -0.08347905 -0.002679574)
            DeGrooteFregly2016Muscle semimem_r: max_isometric_force=3301.48 optimal_fiber_length=0.06526025
                tendon_slack_length=0.3287471 pennation_angle_at_optimal=0.2545615
                passive_fiber_strain_at_one_norm_force=0.7353994
              PathPoint P1: pelvis (-0.1032035 -0.1183559 0.0719052)
              PathPoint P2: tibia_r (-0.02988756 -0.04297625 -0.02019987)
              PathWrap: wrap_object=SM_at_condyles_r method=hybrid
            DeGrooteFregly2016Muscle semiten_r: max_isometric_force=886.9426 optimal_fiber_length=0.1840531
                tendon_slack_length=0.2357396 pennation_angle_at_optimal=0.241295
                passive_fiber_strain_at_one_norm_force=0.7803276
              PathPoint P1: pelvis (-0.1085362 -0.1300877 0.06031137)
              PathPoint P2: tibia_r (-0.03215489 -0.05235476 -0.02360087)
              PathPoint P3: tibia_r (0.00195815 -0.07966581 -0.01205808)
              PathWrap: wrap_object=ST_at_condyles_r method=hybrid
            DeGrooteFregly2016Muscle soleus_r: max_isometric_force=9292.264 optimal_fiber_length=0.04601363
                tendon_slack_length=0.2894214 pennation_angle_at_optimal=0.3814289
                passive_fiber_strain_at_one_norm_force=0.8506533
              PathPoint P1: tibia_r (-0.007832602 -0.09440347 0.01009993)
              PathPoint P2: calcn_r (0.004315791 0.0468248 -0.005198567)
            DeGrooteFregly2016Muscle tfl_r: max_isometric_force=616.8098 optimal_fiber_length=0.09010998
                tendon_slack_length=0.4263597 pennation_angle_at_optimal=0.05235988
                passive_fiber_strain_at_one_norm_force=0.7197196
              PathPoint P1: pelvis (-0.02126785 0.01126598 0.1514196)
              PathPoint P2: femur_r (0.02780295 -0.09409503 0.05645702)
              PathPoint P3: femur_r (0.01011876 -0.3829999 0.03063999)
              PathPoint P4: tibia_r (0.01113054 -0.04225483 0.03565895)
            DeGrooteFregly2016Muscle tibant_r: max_isometric_force=1841.179 optimal_fiber_length=0.07229762
                tendon_slack_length=0.2545353 pennation_angle_at_optimal=0.1951828
                passive_fiber_strain_at_one_norm_force=0.7076768
              PathPoint P1: tibia_r (0.01587132 -0.1352154 0.01669581)
              PathPoint P2: tibia_r (0.0258682 -0.1964334 0.01319175)
              PathPoint P3: tibia_r (0.02401311 -0.3770986 -0.01360399)
              PathPoint P4: calcn_r (0.1143685 0.0268865 -0.02991628)
            DeGrooteFregly2016Muscle tibpost_r: max_isometric_force=2595.231 optimal_fiber_length=0.03977909
                tendon_slack_length=0.2954803 pennation_angle_at_optimal=0.2264891
                passive_fiber_strain_at_one_norm_force=0.6862359
              PathPoint P1: tibia_r (-0.004225483 -0.134391 0.01061524)
              PathPoint P2: tibia_r (-0.01690193 -0.3766863 -0.0180356)
              PathPoint P3: calcn_r (0.04090193 0.05044995 -0.02805264)
              PathPoint P4: calcn_r (0.07572252 0.02401659 -0.02756221)
            DeGrooteFregly2016Muscle vasint_r: max_isometric_force=2546.041 optimal_fiber_length=0.09529884
                tendon_slack_length=0.1940629 pennation_angle_at_optimal=0.06309973
                passive_fiber_strain_at_one_norm_force=0.8514363
              PathPoint P1: femur_r (0.02742468 -0.1819486 0.02931604)
              PathPoint P2: femur_r (0.03168024 -0.1970794 0.02695184)
              PathPoint P3: patella_r (0.005484936 0.04539258 -0.0005674072)
              PathPoint P4: patella_r (0.004728393 0.002335826 -0.0003688147)
              PathPoint P5: tibia_r (0.03356682 -0.06513427 0.0004431604)
              PathWrap: wrap_object=KnExt_at_fem_r method=hybrid
            DeGrooteFregly2016Muscle vaslat_r: max_isometric_force=7723.151 optimal_fiber_length=0.09532408
                tendon_slack_length=0.2115555 pennation_angle_at_optimal=0.2528673
                passive_fiber_strain_at_one_norm_force=0.8928189
              PathPoint P1: femur_r (0.004539258 -0.1753288 0.03300419)
              PathPoint P2: femur_r (0.02543876 -0.2450253 0.03867826)
              PathPoint P3: patella_r (0.00974049 0.04000221 0.01333407)
              PathPoint P4: patella_r (0.004728393 0.002335826 0.006931825)
              PathPoint P5: tibia_r (0.0335359 -0.06531978 0.005266394)
              PathWrap: wrap_object=KnExt_at_fem_r method=hybrid
            DeGrooteFregly2016Muscle vasmed_r: max_isometric_force=4121.734 optimal_fiber_length=0.09295869
                tendon_slack_length=0.1919715 pennation_angle_at_optimal=0.4222225
                passive_fiber_strain_at_one_norm_force=0.8518332
              PathPoint P1: femur_r (0.0132395 -0.198498 0.01777876)
              PathPoint P2: femur_r (0.03366616 -0.2618584 0.0008511108)
              PathPoint P3: patella_r (0.005957776 0.0420827 -0.01607654)
              PathPoint P4: patella_r (0.004728393 0.002335826 -0.008038269)
              PathPoint P5: tibia_r (0.03287632 -0.06551559 -0.006987505)
              PathWrap: wrap_object=KnExt_at_fem_r method=hybrid
            CoordinateActuator pelvis_tilt_residual: coordinate=pelvis_tilt optimal_force=1000
            CoordinateActuator pelvis_list_residual: coordinate=pelvis_list optimal_force=1000
            CoordinateActuator pelvis_rotation_residual: coordinate=pelvis_rotation optimal_force=1000
            CoordinateActuator pelvis_tx_residual: coordinate=pelvis_tx optimal_force=1000
            CoordinateActuator pelvis_ty_residual: coordinate=pelvis_ty optimal_force=1000
            CoordinateActuator pelvis_tz_residual: coordinate=pelvis_tz optimal_force=1000
            CoordinateActuator hip_flexion_r_reserve: coordinate=hip_flexion_r optimal_force=1
            CoordinateActuator hip_adduction_r_reserve: coordinate=hip_adduction_r optimal_force=1
            CoordinateActuator hip_rotation_r_reserve: coordinate=hip_rotation_r optimal_force=1
            CoordinateActuator knee_angle_r_reserve: coordinate=knee_angle_r optimal_force=1
            CoordinateActuator ankle_angle_r_reserve: coordinate=ankle_angle_r optimal_force=1
            CoordinateActuator subtalar_angle_r_reserve: coordinate=subtalar_angle_r optimal_force=1
            CoordinateActuator mtp_angle_r_reserve: coordinate=mtp_angle_r optimal_force=1
            CoordinateActuator hip_flexion_l_reserve: coordinate=hip_flexion_l optimal_force=1000
            CoordinateActuator hip_adduction_l_reserve: coordinate=hip_adduction_l optimal_force=1000
            CoordinateActuator hip_rotation_l_reserve: coordinate=hip_rotation_l optimal_force=1000
            CoordinateActuator knee_angle_l_reserve: coordinate=knee_angle_l optimal_force=1000
            CoordinateActuator ankle_angle_l_reserve: coordinate=ankle_angle_l optimal_force=1000
            CoordinateActuator subtalar_angle_l_reserve: coordinate=subtalar_angle_l optimal_force=1000
            CoordinateActuator mtp_angle_l_reserve: coordinate=mtp_angle_l optimal_force=1000
            CoordinateActuator lumbar_extension_reserve: coordinate=lumbar_extension optimal_force=1000
            CoordinateActuator lumbar_bending_reserve: coordinate=lumbar_bending optimal_force=1000
            CoordinateActuator lumbar_rotation_reserve: coordinate=lumbar_rotation optimal_force=1000
            SmoothSphereHalfSpaceForce [values shared by the 6 below unless stated]: socket_half_space=/contactgeometryset/floor
                stiffness=1000000 [N/m^2] dissipation=2 [s/m] static_friction=0.8 dynamic_friction=0.8
                viscous_friction=0.5 transition_velocity=0.2 [m/s] constant_contact_force=1e-5 [N] hertz_smoothing=300
                hunt_crossley_smoothing=50
            SmoothSphereHalfSpaceForce floor_heel_r: socket_sphere=/contactgeometryset/heel_r
            SmoothSphereHalfSpaceForce floor_mid1_r: socket_sphere=/contactgeometryset/mid1_r
            SmoothSphereHalfSpaceForce floor_mid2_r: socket_sphere=/contactgeometryset/mid2_r
            SmoothSphereHalfSpaceForce floor_fore1_r: socket_sphere=/contactgeometryset/fore1_r
            SmoothSphereHalfSpaceForce floor_fore2_r: socket_sphere=/contactgeometryset/fore2_r
            SmoothSphereHalfSpaceForce floor_toe_r: socket_sphere=/contactgeometryset/toe_r
          MarkerSet:
            Marker R.Shoulder: torso (0 0.3516892 0.1647898) fixed=true
            Marker L.Shoulder: torso (0 0.3516892 -0.1647898) fixed=true
            Marker R.Clavicle: torso (0.05338261 0.3239243 0.02901229) fixed=true
            Marker L.Clavicle: torso (0.05338261 0.3239243 -0.02901229) fixed=true
            Marker R.ASIS: pelvis (0.01359317 0.00311463 0.1499001) fixed=true
            Marker L.ASIS: pelvis (0.01359317 0.00311463 -0.1499001) fixed=true
            Marker S2: pelvis (-0.1882131 0.02595525 0) fixed=true
            Marker R.PSIS: pelvis (-0.1624344 0.0309674 0.04153466)
            Marker L.PSIS: pelvis (-0.1645468 0.03633749 -0.0513201)
            Marker R_HJC: femur_r (0 0 0) fixed=true
            Marker L_HJC: femur_l (0 0 0) fixed=true
            Marker R.TH1: femur_r (0.02775411 -0.1365102 0.0903398)
            Marker R.TH2: femur_r (-0.06997831 -0.1453774 0.05237545)
            Marker R.TH3: femur_r (-0.06821624 -0.2751238 0.03937016)
            Marker R.Knee: femur_r (0 -0.3820542 0.0444469) fixed=true
            Marker R.MKnee: femur_r (0.004728393 -0.3792172 -0.04728393) fixed=true
            Marker R.SH1: tibia_r (0.0006017172 -0.08300908 0.05727722)
            Marker R.SH2: tibia_r (-0.003521689 -0.1917335 0.0822396)
            Marker R.SH3: tibia_r (-0.08039069 -0.08785341 0.04081473)
            Marker R.SH4: tibia_r (-0.08067401 -0.2085197 0.05123566)
            Marker R.Ankle: tibia_r (-0.006968764 -0.392225 0.05271994)
            Marker R.MAnkle: tibia_r (0.006183633 -0.3903934 -0.03916301) fixed=true
            Marker R.Toe: calcn_r (0.2084271 0.06250475 -0.0001278334)
            Marker R.MT5: calcn_r (0.1669961 0.02723728 0.06126144)
            Marker R.Heel: calcn_r (-0.009719574 0.0420243 0.002855857)
            Marker L.TH1: femur_l (0.03814275 -0.08661044 -0.0894233)
            Marker L.TH2: femur_l (0.04478048 -0.2178012 -0.06776629)
            Marker L.TH3: femur_l (-0.0680416 -0.08103937 -0.08557444)
            Marker L.TH4: femur_l (-0.07112215 -0.2137561 -0.05004009)
            Marker L.Knee: femur_l (0 -0.3820542 -0.0444469) fixed=true
            Marker L.MKnee: femur_l (0.004728393 -0.3792172 0.04728393) fixed=true
            Marker L.SH1: tibia_l (0.02203067 -0.08291017 -0.04103734)
            Marker L.SH2: tibia_l (-0.07128582 -0.07908458 -0.05154603)
            Marker L.SH3: tibia_l (-0.06702403 -0.1958186 -0.06457565)
            Marker L.Ankle: tibia_l (-0.004319593 -0.3868503 -0.05138765)
            Marker L.MAnkle: tibia_l (0.006183633 -0.3903934 0.03916301) fixed=true
            Marker L.Toe: calcn_l (0.2118537 0.05600252 -0.0044213)
            Marker L.Heel: calcn_l (-0.008649976 0.03956839 0.003991748)
            Marker L.MT5: calcn_l (0.1650043 0.02689086 -0.06193001)
            Marker MidPSIS: pelvis (-0.1610267 0.03945198 0) fixed=true
            Marker MidASIS: pelvis (0.01359317 0.00311463 0) fixed=true
            Marker MidClavicle: torso (0.05338261 0.3239243 0) fixed=true
            Marker L.AnkleJoint: tibia_l (0.0005153028 -0.3903934 -0.007729541) fixed=true
            Marker L.KneeJoint: femur_l (0.002364197 -0.3806357 0.001418518) fixed=true
            Marker L.HeelGround: calcn_l (-0.01961723 -0.007552387 0.009808616) fixed=true
            Marker L.MT5Ground: calcn_l (0.1569379 -0.007552387 -0.04904308) fixed=true
            Marker L.ToeGround: calcn_l (0.2255982 -0.007552387 0.01569379) fixed=true
            Marker L.AnkleJointGround: tibia_l (0.0005153028 -0.4606291 -0.007729541) fixed=true
            Marker R.AnkleJoint: tibia_r (0.0005153028 -0.3903934 0.007729541) fixed=true
            Marker R.KneeJoint: femur_r (0.002364197 -0.3806357 -0.001418518) fixed=true
            Marker R.HeelGround: calcn_r (-0.01961723 -0.007552387 -0.009808616) fixed=true
            Marker R.MT5Ground: calcn_r (0.1569379 -0.007552387 0.04904308) fixed=true
            Marker R.ToeGround: calcn_r (0.2255982 -0.007552387 -0.01569379) fixed=true
            Marker R.AnkleJointGround: tibia_r (0.0005153028 -0.4606291 0.007729541) fixed=true
          ContactGeometrySet:
            ContactSphere heel_r: socket_frame=/bodyset/calcn_r location=(0.01 0 -0.003) radius=0.03
            ContactSphere mid1_r: socket_frame=/bodyset/calcn_r location=(0.1 -0.002 -0.021) radius=0.025
            ContactSphere mid2_r: socket_frame=/bodyset/calcn_r location=(0.08 -0.002 0.021) radius=0.025
            ContactSphere fore1_r: socket_frame=/bodyset/calcn_r location=(0.17 -0.002 -0.022) radius=0.025
            ContactSphere fore2_r: socket_frame=/bodyset/calcn_r location=(0.13 -0.002 0.032) radius=0.025
            ContactSphere toe_r: socket_frame=/bodyset/toes_r location=(0.05 -0.002 0) radius=0.02
            ContactHalfSpace floor: socket_frame=/ground location=(0.5 0 -0.25) orientation=(0 0 -1.570796)
      MocoInitialBounds time_initial_bounds: bounds=0.245
      MocoFinalBounds time_final_bounds: bounds=0.53
      goals:
        MocoMarkerTrackingGoal marker_tracking: weight=1 allow_unused_references=true
          MarkersReference markers_reference:
            Set_MarkerWeight_ marker_weights:
              MarkerWeight R.Shoulder: weight=1
              MarkerWeight L.Shoulder: weight=1
              MarkerWeight R.Clavicle: weight=1
              MarkerWeight L.Clavicle: weight=1
              MarkerWeight R.ASIS: weight=4
              MarkerWeight L.ASIS: weight=4
              MarkerWeight R.PSIS: weight=4
              MarkerWeight L.PSIS: weight=4
              MarkerWeight S2: weight=4
              MarkerWeight R.TH1: weight=1
              MarkerWeight R.TH2: weight=1
              MarkerWeight R.TH3: weight=1
              MarkerWeight L.TH1: weight=1
              MarkerWeight L.TH2: weight=1
              MarkerWeight L.TH3: weight=1
              MarkerWeight R.SH1: weight=1
              MarkerWeight R.SH2: weight=1
              MarkerWeight R.SH3: weight=1
              MarkerWeight L.SH1: weight=1
              MarkerWeight L.SH2: weight=1
              MarkerWeight L.SH3: weight=1
              MarkerWeight R.Knee: weight=2
              MarkerWeight L.Knee: weight=2
              MarkerWeight R.Ankle: weight=2
              MarkerWeight L.Ankle: weight=2
              MarkerWeight R.Heel: weight=3
              MarkerWeight L.Heel: weight=3
              MarkerWeight R.Toe: weight=3
              MarkerWeight L.Toe: weight=3
              MarkerWeight R.MT5: weight=3
              MarkerWeight L.MT5: weight=3
        MocoControlGoal control_effort: weight=0.001
        MocoContactTrackingGoal GRF_tracking: weight=1 external_loads_file=./input/setup_extLoad.xml
            normalize_tracking_error=true
          contact_groups: MocoContactTrackingGoalGroup: contact_force_paths=(/forceset/floor_heel_r /forceset/floor_mid1_r /forceset/floor_mid2_r /forceset/floor_fore1_r /forceset/floor_fore2_r /forceset/floor_toe_r)
              external_force_name=right alternative_frame_paths=/bodyset/toes_r
  MocoCasADiSolver solver:
    num_mesh_intervals: 29
    multibody_dynamics_mode: explicit
    optim_max_iterations: 10000
    optim_convergence_tolerance: 1e-5
    optim_constraint_tolerance: 0.001
    optim_finite_difference_scheme: forward
