# OpenSim document version 40000
InverseKinematicsTool subject20_rfs_trial11_ik:
  results_directory: ./
  model_file: ./out_scaled.osim
  constraint_weight: Inf
  accuracy: 1e-5
  time_range: 0 1.44
  output_motion_file: .\out_ik.mot
  report_errors: true
  marker_file: exp_markers.trc
  report_marker_locations: flase
  IKTaskSet subject20_rfs_trial11:
    IKMarkerTask R.Shoulder: apply=true weight=2
    IKMarkerTask L.Shoulder: apply=true weight=2
    IKMarkerTask R.Clavicle: apply=true weight=2
    IKMarkerTask L.Clavicle: apply=true weight=2
    IKMarkerTask R.ASIS: apply=true weight=10
    IKMarkerTask L.ASIS: apply=true weight=10
    IKMarkerTask S2: apply=true weight=10
    IKMarkerTask R.PSIS: apply=true weight=10
    IKMarkerTask L.PSIS: apply=true weight=10
    IKMarkerTask R.TH1: apply=true weight=4
    IKMarkerTask R.TH2: apply=true weight=4
    IKMarkerTask R.TH3: apply=true weight=4
    IKMarkerTask R.Knee: apply=true weight=3
    IKMarkerTask R.SH1: apply=true weight=4
    IKMarkerTask R.SH2: apply=true weight=4
    IKMarkerTask R.SH3: apply=true weight=4
    IKMarkerTask R.SH4: apply=false weight=4
    IKMarkerTask R.Ankle: apply=true weight=3
    IKMarkerTask R.MAnkle: apply=false weight=3
    IKMarkerTask R.Toe: apply=true weight=4
    IKMarkerTask R.MT5: apply=true weight=4
    IKMarkerTask R.Heel: apply=true weight=4
    IKMarkerTask L.TH1: apply=true weight=4
    IKMarkerTask L.TH2: apply=true weight=4
    IKMarkerTask L.TH3: apply=true weight=4
    IKMarkerTask L.TH4: apply=false weight=4
    IKMarkerTask L.Knee: apply=true weight=3
    IKMarkerTask L.SH1: apply=true weight=4
    IKMarkerTask L.SH2: apply=true weight=4
    IKMarkerTask L.SH3: apply=true weight=4
    IKMarkerTask L.Ankle: apply=true weight=3
    IKMarkerTask L.MAnkle: apply=false weight=3
    IKMarkerTask L.Toe: apply=true weight=4
    IKMarkerTask L.Heel: apply=true weight=4
    IKMarkerTask L.MT5: apply=true weight=4
