# OpenSim document version 30000
MarkerSet loadedwalking_subject11_prescale:
  Marker Head: torso (0 0.67 0) fixed=true
  Marker R.Shoulder: torso (0 0.418 0.142) fixed=true
  Marker L.Shoulder: torso (0 0.418 -0.142) fixed=true
  Marker R.Clavicle: torso (0.046 0.385 0.025) fixed=true
  Marker L.Clavicle: torso (0.046 0.385 -0.025) fixed=true
  Marker R.ASIS: pelvis (0.013 0.03 0.128) fixed=true
  Marker L.ASIS: pelvis (0.013 0.03 -0.128) fixed=true
  Marker S2: pelvis (-0.18 0.025 0) fixed=true
  Marker R.PSIS: pelvis (-0.154 0.038 0.055)
  Marker L.PSIS: pelvis (-0.154 0.038 -0.055)
  Marker R_HJC: femur_r (0 0 0) fixed=true
  Marker L_HJC: femur_l (0 0 0) fixed=true
  Marker R.TH1: femur_r (0.012 -0.2 0.11)
  Marker R.TH2: femur_r (0.012 -0.18 0.11)
  Marker R.TH3: femur_r (0.012 -0.16 0.11)
  Marker R.Knee: femur_r (0 -0.404 0.047) fixed=true
  Marker R.MKnee: femur_r (0.005 -0.401 -0.05) fixed=true
  Marker R.SH1: tibia_r (0.012 -0.25 0.08)
  Marker R.SH2: tibia_r (0.012 -0.23 0.08)
  Marker R.SH3: tibia_r (0.012 -0.21 0.08)
  Marker R.SH4: tibia_r (0.012 -0.19 0.08)
  Marker R.Ankle: tibia_r (-0.005 -0.3788 0.053)
  Marker R.MAnkle: tibia_r (0.006 -0.3788 -0.038) fixed=true
  Marker R.Toe: calcn_r (0.23 0.037 -0.016)
  Marker R.MT5: calcn_r (0.16 0.02 0.05)
  Marker R.Heel: calcn_r (-0.02 0.02 -0.01)
  Marker L.TH1: femur_l (0.012 -0.2 -0.11)
  Marker L.TH2: femur_l (0.012 -0.18 -0.11)
  Marker L.TH3: femur_l (0.012 -0.16 -0.11)
  Marker L.TH4: femur_l (0.012 -0.14 -0.11)
  Marker L.Knee: femur_l (0 -0.404 -0.047) fixed=true
  Marker L.MKnee: femur_l (0.005 -0.401 0.05) fixed=true
  Marker L.SH1: tibia_l (0.012 -0.25 -0.08)
  Marker L.SH2: tibia_l (0.012 -0.23 -0.08)
  Marker L.SH3: tibia_l (0.012 -0.21 -0.08)
  Marker L.Ankle: tibia_l (-0.005 -0.3788 -0.053)
  Marker L.MAnkle: tibia_l (0.006 -0.3788 0.038) fixed=true
  Marker L.Toe: calcn_l (0.23 0.037 0.016)
  Marker L.Heel: calcn_l (-0.02 0.02 0.01)
  Marker L.MT5: calcn_l (0.16 0.02 -0.05)
  Marker MidPSIS: pelvis (-0.154 0.038 0) fixed=true
  Marker MidASIS: pelvis (0.013 0.03 0) fixed=true
  Marker MidClavicle: torso (0.046 0.385 0) fixed=true
  Marker L.AnkleJoint: tibia_l (0.0005 -0.3788 -0.0075) fixed=true
  Marker L.KneeJoint: femur_l (0.0025 -0.4025 0.0015) fixed=true
  Marker L.HeelGround: calcn_l (-0.02 -0.005 0.01) fixed=true
  Marker L.MT5Ground: calcn_l (0.16 -0.005 -0.05) fixed=true
  Marker L.ToeGround: calcn_l (0.23 -0.005 0.016) fixed=true
  Marker L.AnkleJointGround: tibia_l (0.0005 -0.44695 -0.0075) fixed=true
  Marker R.AnkleJoint: tibia_r (0.0005 -0.3788 0.0075) fixed=true
  Marker R.KneeJoint: femur_r (0.0025 -0.4025 -0.0015) fixed=true
  Marker R.HeelGround: calcn_r (-0.02 -0.005 -0.01) fixed=true
  Marker R.MT5Ground: calcn_r (0.16 -0.005 0.05) fixed=true
  Marker R.ToeGround: calcn_r (0.23 -0.005 -0.016) fixed=true
  Marker R.AnkleJointGround: tibia_r (0.0005 -0.44695 0.0075) fixed=true
