# OpenSim document version 40000
ScaleTool subject20_scaled:
  mass: 53.549 [kg]
  height: -1
  age: -1
  GenericModelMaker:
    model_file: Rajagopal2015_passiveCal_hipAbdMoved_noArms.osim
  ModelScaler:
    apply: true
    scaling_order: measurements
    marker_file: ./exp_static.trc
    time_range: 0 3.255
    preserve_mass_distribution: true
    MeasurementSet:
      Measurement PelvisX: apply=true
        MarkerPair: markers=(MidPSIS MidASIS)
        BodyScale pelvis: axes=X
      Measurement PelvisY: apply=true
        MarkerPair: markers=(R.PSIS R_HJC)
        MarkerPair: markers=(L.PSIS L_HJC)
        MarkerPair: markers=(R.ASIS R_HJC)
        MarkerPair: markers=(L.ASIS L_HJC)
        BodyScale pelvis: axes=Y
      Measurement PelvisZ: apply=true
        MarkerPair: markers=(L_HJC R_HJC)
        MarkerPair: markers=(R.ASIS L.ASIS)
        BodyScale pelvis: axes=Z
      Measurement femur: apply=true
        MarkerPair: markers=(L.Knee L_HJC)
        MarkerPair: markers=(R.Knee R_HJC)
        BodyScale femur_r: axes=(X Y Z)
        BodyScale patella_r: axes=(X Y Z)
        BodyScale femur_l: axes=(X Y Z)
        BodyScale patella_l: axes=(X Y Z)
      Measurement tibia: apply=true
        MarkerPair: markers=(L.Knee L.Ankle)
        MarkerPair: markers=(R.Knee R.Ankle)
        BodyScale tibia_r: axes=(X Y Z)
        BodyScale tibia_l: axes=(X Y Z)
      Measurement footXZ: apply=true
        MarkerPair: markers=(L.MT5Ground L.HeelGround)
        MarkerPair: markers=(R.MT5Ground R.HeelGround)
        BodyScale talus_r: axes=(X Z)
        BodyScale calcn_r: axes=(X Z)
        BodyScale toes_r: axes=(X Z)
        BodyScale talus_l: axes=(X Z)
        BodyScale calcn_l: axes=(X Z)
        BodyScale toes_l: axes=(X Z)
      Measurement footY: apply=true
        MarkerPair: markers=(L.AnkleJoint L.AnkleJointGround)
        MarkerPair: markers=(R.AnkleJoint R.AnkleJointGround)
        BodyScale talus_r: axes=Y
        BodyScale calcn_r: axes=Y
        BodyScale toes_r: axes=Y
        BodyScale talus_l: axes=Y
        BodyScale calcn_l: axes=Y
        BodyScale toes_l: axes=Y
      Measurement torsoY: apply=true
        MarkerPair: markers=(MidClavicle MidASIS)
        BodyScale torso: axes=Y
      Measurement torsoXZ: apply=true
        MarkerPair: markers=(R.Shoulder L.Shoulder)
        BodyScale torso: axes=(X Z)
      Measurement arm: apply=false
        MarkerPair: markers=(L.Shoulder L.Elbow)
        MarkerPair: markers=(R.Shoulder R.Elbow)
        MarkerPair: markers=(L.Shoulder L.MElbow)
        MarkerPair: markers=(R.Shoulder R.MElbow)
      Measurement forearm: apply=false
        MarkerPair: markers=(L.Elbow L.Wrist)
        MarkerPair: markers=(R.Elbow R.Wrist)
        MarkerPair: markers=(L.MElbow L.Wrist)
        MarkerPair: markers=(R.MElbow R.Wrist)
  MarkerPlacer:
    apply: true
    marker_file: ./exp_static.trc
    time_range: 0 3.255
    output_motion_file: ./out_static.mot
    output_model_file: ./out_scaled.osim
    max_marker_movement: -1
    IKTaskSet:
      IKMarkerTask R.Shoulder: apply=true weight=5
      IKMarkerTask L.Shoulder: apply=true weight=5
      IKMarkerTask R.Clavicle: apply=true weight=1
      IKMarkerTask L.Clavicle: apply=true weight=1
      IKMarkerTask R.ASIS: apply=true weight=10
      IKMarkerTask L.ASIS: apply=true weight=10
      IKMarkerTask S2: apply=true weight=5
      IKMarkerTask R.PSIS: apply=true weight=10
      IKMarkerTask L.PSIS: apply=true weight=10
      IKMarkerTask R_HJC: apply=true weight=50
      IKMarkerTask L_HJC: apply=true weight=50
      IKMarkerTask R.Knee: apply=true weight=15
      IKMarkerTask R.MKnee: apply=true weight=15
      IKMarkerTask R.Ankle: apply=true weight=15
      IKMarkerTask R.MAnkle: apply=true weight=10
      IKMarkerTask R.MT5: apply=true weight=5
      IKMarkerTask R.Heel: apply=true weight=5
      IKMarkerTask L.Knee: apply=true weight=15
      IKMarkerTask L.MKnee: apply=true weight=15
      IKMarkerTask L.Ankle: apply=true weight=15
      IKMarkerTask L.MAnkle: apply=true weight=10
      IKMarkerTask L.Heel: apply=true weight=5
      IKMarkerTask L.MT5: apply=true weight=5
      IKMarkerTask MidPSIS: apply=true weight=10
      IKMarkerTask MidASIS: apply=true weight=15
      IKMarkerTask MidClavicle: apply=true weight=1
      IKMarkerTask L.AnkleJoint: apply=true weight=15
      IKMarkerTask L.KneeJoint: apply=true weight=15
      IKMarkerTask L.HeelGround: apply=true weight=5
      IKMarkerTask L.MT5Ground: apply=true weight=5
      IKMarkerTask L.AnkleJointGround: apply=true weight=10
      IKMarkerTask R.AnkleJoint: apply=true weight=15
      IKMarkerTask R.KneeJoint: apply=true weight=15
      IKMarkerTask R.HeelGround: apply=true weight=5
      IKMarkerTask R.MT5Ground: apply=true weight=5
      IKMarkerTask R.AnkleJointGround: apply=true weight=10
